# OpenSim document version 40500
AnalyzeTool walkPref_0:
  model_file: C:\Users\z3550257\Dropbox\University\GitHubClones\TheiaOpensim\ExampleData\P01_procesed_with_single_calib\ModelScaling\static_0_Theia_Scaled.osim
  replace_force_set: false
  results_directory: C:\Users\z3550257\Dropbox\University\GitHubClones\TheiaOpensim\ExampleData\P01_procesed_with_single_calib\BodyAnalysis\
  output_precision: 8
  initial_time: 0.01
  final_time: 34.52
  solve_for_equilibrium_for_auxiliary_states: true
  maximum_number_of_integrator_steps: 20000
  maximum_integrator_step_size: 1
  minimum_integrator_step_size: 1e-8
  integrator_error_tolerance: 1e-5
  coordinates_file: C:\Users\z3550257\Dropbox\University\GitHubClones\TheiaOpensim\ExampleData\P01_procesed_with_single_calib\InverseKinematics\walkPref_0_Theia.mot
  lowpass_cutoff_frequency_for_coordinates: -1
  AnalysisSet Analyses:
    BodyKinematics: start_time=0.01 end_time=34.52 step_interval=1 in_degrees=true bodies=all
        express_results_in_body_local_frame=false
