# OpenSim document version 40500
InverseKinematicsTool walkPref_0_Theia:
  results_directory: C:\Users\z3550257\Dropbox\University\GitHubClones\TheiaOpensim\ExampleData\P01_procesed_with_single_calib\InverseKinematics\
  accuracy: 0.0001
  time_range: 0.01 34.52
  output_motion_file: C:\Users\z3550257\Dropbox\University\GitHubClones\TheiaOpensim\ExampleData\P01_procesed_with_single_calib\InverseKinematics\walkPref_0_Theia.mot
  marker_file: C:\Users\z3550257\Dropbox\University\GitHubClones\TheiaOpensim\ExampleData\P01_procesed_with_single_calib\C3D_data\walkPref_0_Theia.trc
  IKTaskSet:
    IKMarkerTask TORSO: apply=true weight=5
    IKMarkerTask RSHO: apply=true weight=1
    IKMarkerTask RUA: apply=true weight=1
    IKMarkerTask RELB: apply=true weight=1
    IKMarkerTask RFRM: apply=true weight=1
    IKMarkerTask RWRIST: apply=true weight=1
    IKMarkerTask RHAND: apply=true weight=1
    IKMarkerTask PELVIS2: apply=true weight=5
    IKMarkerTask RHIP: apply=true weight=5
    IKMarkerTask RTHI: apply=true weight=1
    IKMarkerTask RKNEE: apply=true weight=1
    IKMarkerTask RSHA: apply=true weight=1
    IKMarkerTask RANK: apply=true weight=1
    IKMarkerTask RCALC: apply=true weight=1
    IKMarkerTask R_LCALC: apply=true weight=1
    IKMarkerTask RMTP: apply=true weight=1
    IKMarkerTask RTOE: apply=true weight=1
    IKMarkerTask LSHO: apply=true weight=1
    IKMarkerTask LUA: apply=true weight=1
    IKMarkerTask LELB: apply=true weight=1
    IKMarkerTask LFRM: apply=true weight=1
    IKMarkerTask LWRIST: apply=true weight=1
    IKMarkerTask LHAND: apply=true weight=1
    IKMarkerTask LHIP: apply=true weight=5
    IKMarkerTask LTHI: apply=true weight=1
    IKMarkerTask LKNEE: apply=true weight=1
    IKMarkerTask LSHA: apply=true weight=1
    IKMarkerTask LANK: apply=true weight=1
    IKMarkerTask LCALC: apply=true weight=1
    IKMarkerTask L_LCALC: apply=true weight=1
    IKMarkerTask LMTP: apply=true weight=1
    IKMarkerTask LTOE: apply=true weight=1
    IKMarkerTask PELVIS1: apply=true weight=5
    IKMarkerTask CVJ: apply=true weight=1
    IKMarkerTask HEAD_L: apply=true weight=1
    IKMarkerTask HEAD_R: apply=true weight=1
    IKMarkerTask TORSO_L: apply=true weight=3
    IKMarkerTask TORSO_R: apply=true weight=3
    IKMarkerTask TORSO_LOW: apply=true weight=5
    IKMarkerTask HEAD_CENTRE: apply=true weight=1
