# OpenSim document version 40500
MarkerSet:
  Marker TORSO: torso (0.0002671834 0.4393208 0.001397673)
  Marker RSHO: humerus_r (0.002880088 -0.002997266 0.0001087873)
  Marker RUA: humerus_r (0.01958066 -0.1452245 0.02642106)
  Marker RELB: ulna_r (-0.01017316 -0.001883346 -0.01230216)
  Marker RFRM: radius_r (0.02763072 -0.09769103 0.01869474)
  Marker RWRIST: hand_r (0.002746126 -0.005899202 0.01696314)
  Marker RHAND: hand_r (-0.001066062 -0.06369962 -0.001834393)
  Marker PELVIS1: pelvis (-0.05072288 0.02483236 -0.000454219)
  Marker RHIP: femur_r (0.004029182 0.006983295 0.02300076)
  Marker RTHI: femur_r (0.01436959 -0.1949978 0.09170957)
  Marker RKNEE: tibia_r (0.0008747292 0.006189291 0.01365991)
  Marker RSHA: tibia_r (0.002532384 -0.1957431 0.07235235)
  Marker RANK: talus_r (-0.006143905 0.006949583 0.002873963)
  Marker RCALC: calcn_r (-0.01104272 -0.01787061 -0.008911636)
  Marker R_LCALC: calcn_r (0.03467041 0.003775728 0.03219959)
  Marker RMTP: toes_r (0.00285833 -0.007182696 -0.0001659577)
  Marker RTOE: toes_r (0.05200792 -0.001455508 0.001973961)
  Marker LSHO: humerus_l (0.0003237864 -0.002121508 0.002248337)
  Marker LUA: humerus_l (0.03319302 -0.1424298 -0.01856012)
  Marker LELB: ulna_l (-0.007474789 -0.000838912 0.004888042)
  Marker LFRM: radius_l (0.03465209 -0.1020766 -0.01253639)
  Marker LWRIST: hand_l (0.001360015 -0.005328405 -0.01368664)
  Marker LHAND: hand_l (-0.001829677 -0.06359577 0.002159656)
  Marker LHIP: femur_l (0.004020302 0.007147694 -0.02417348)
  Marker LTHI: femur_l (0.01238402 -0.1954342 -0.0913656)
  Marker LKNEE: tibia_l (0.0003891685 0.006565873 -0.01137476)
  Marker LSHA: tibia_l (0.0004656142 -0.1950441 -0.07118838)
  Marker LANK: talus_l (-0.006038205 0.007270026 -0.002328263)
  Marker LCALC: calcn_l (-0.01118548 -0.01755255 0.007419839)
  Marker L_LCALC: calcn_l (0.03551997 0.003701437 -0.03222901)
  Marker LMTP: toes_l (0.002713285 -0.006850781 0.0002597298)
  Marker LTOE: toes_l (0.05189648 -0.001268851 -0.001538488)
  Marker PELVIS2: pelvis (-0.05226157 -0.06763712 -0.0005836557)
  Marker CVJ: head (-0.00675884 -0.0001390448 -0.000129314)
  Marker HEAD_L: head (-0.005212709 0.1248702 -0.07509458)
  Marker HEAD_R: head (-0.01007272 0.1248428 0.07482469)
  Marker TORSO_L: torso (0.007321223 0.4396541 -0.1484351)
  Marker TORSO_R: torso (-0.006786606 0.4389874 0.1512306)
  Marker TORSO_LOW: torso (-0.002375316 0.1855412 0.0007096943)
  Marker HEAD_CENTRE: head (0.02175819 0.01999984 0) fixed=true
