# OpenSim document version 40500
ScaleTool static:
  mass: 73 [kg]
  height: -1
  age: -1
  GenericModelMaker Rajagopal2015_Theia3D_V5:
    model_file: C:\Users\z3550257\Dropbox\University\GitHubClones\TheiaOpensim\TheiaModel\Rajagopal2015_Theia3D_V5.osim
  ModelScaler:
    apply: true
    scaling_order: measurements
    marker_file: C:\Users\z3550257\Dropbox\University\GitHubClones\TheiaOpensim\ExampleData\P01_procesed_with_single_calib\C3D_data\static_0_Theia.trc
    time_range: 0.01 0.51
    preserve_mass_distribution: false
    output_model_file: C:\Users\z3550257\Dropbox\University\GitHubClones\TheiaOpensim\ExampleData\P01_procesed_with_single_calib\ModelScaling\static_0_Theia_Scaled.osim
    output_scale_file: C:\Users\z3550257\Dropbox\University\GitHubClones\TheiaOpensim\ExampleData\P01_procesed_with_single_calib\ModelScaling\static_0_Theia_scaleSetApplied.xml
    MeasurementSet:
      Measurement pelvis_width: apply=true
        MarkerPair: markers=(RHIP LHIP)
        BodyScale pelvis: axes=(X Z)
      Measurement pelvis_height: apply=true
        MarkerPair: markers=(PELVIS1 PELVIS2)
        BodyScale pelvis: axes=Y
      Measurement thigh_l: apply=true
        MarkerPair: markers=(LHIP LKNEE)
        BodyScale femur_l: axes=(X Y Z)
        BodyScale patella_l: axes=(X Y Z)
      Measurement thigh_r: apply=true
        MarkerPair: markers=(RHIP RKNEE)
        BodyScale femur_r: axes=(X Y Z)
        BodyScale patella_r: axes=(X Y Z)
      Measurement shank_l: apply=true
        MarkerPair: markers=(LKNEE LANK)
        BodyScale tibia_l: axes=(X Y Z)
      Measurement shank_r: apply=true
        MarkerPair: markers=(RKNEE RANK)
        BodyScale tibia_r: axes=(X Y Z)
      Measurement foot_length_l: apply=true
        MarkerPair: markers=(LCALC LMTP)
        BodyScale talus_l: axes=(X Y Z)
        BodyScale calcn_l: axes=(X Y Z)
      Measurement foot_length_r: apply=true
        MarkerPair: markers=(RCALC RMTP)
        BodyScale talus_r: axes=(X Y Z)
        BodyScale calcn_r: axes=(X Y Z)
      Measurement torso_height: apply=true
        MarkerPair: markers=(TORSO TORSO_LOW)
        BodyScale torso: axes=(X Z)
      Measurement torso_width: apply=true
        MarkerPair: markers=(RSHO LSHO)
        BodyScale torso: axes=Y
      Measurement upper_arm_r: apply=true
        MarkerPair: markers=(RSHO RELB)
        BodyScale humerus_r: axes=(X Y Z)
      Measurement upper_arm_l: apply=true
        MarkerPair: markers=(LSHO LELB)
        BodyScale humerus_l: axes=(X Y Z)
      Measurement lower_arm_r: apply=true
        MarkerPair: markers=(RELB RWRIST)
        BodyScale ulna_r: axes=(X Y Z)
        BodyScale radius_r: axes=(X Y Z)
      Measurement lower_arm_l: apply=true
        MarkerPair: markers=(LELB LWRIST)
        BodyScale ulna_l: axes=(X Y Z)
        BodyScale radius_l: axes=(X Y Z)
      Measurement hand_r: apply=true
        MarkerPair: markers=(RWRIST RHAND)
        BodyScale hand_r: axes=(X Y Z)
      Measurement hand_l: apply=true
        MarkerPair: markers=(LWRIST LHAND)
        BodyScale hand_l: axes=(X Y Z)
      Measurement toes: apply=true
        MarkerPair: markers=(RMTP RTOE)
        MarkerPair: markers=(LMTP LTOE)
        BodyScale toes_r: axes=(X Y Z)
        BodyScale toes_l: axes=(X Y Z)
      Measurement foot_height_l: apply=false
        MarkerPair: markers=(LANK LCALC)
      Measurement foot_height_r: apply=false
        MarkerPair: markers=(RANK RCALC)
      Measurement head: apply=true
        MarkerPair: markers=(HEAD_L HEAD_R)
        BodyScale head: axes=(X Y Z)
  MarkerPlacer:
    apply: true
    marker_file: C:\Users\z3550257\Dropbox\University\GitHubClones\TheiaOpensim\ExampleData\P01_procesed_with_single_calib\C3D_data\static_0_Theia.trc
    time_range: 0.01 0.51
    output_motion_file: C:\Users\z3550257\Dropbox\University\GitHubClones\TheiaOpensim\ExampleData\P01_procesed_with_single_calib\ModelScaling\static_0_Theia_static.mot
    output_model_file: C:\Users\z3550257\Dropbox\University\GitHubClones\TheiaOpensim\ExampleData\P01_procesed_with_single_calib\ModelScaling\static_0_Theia_Scaled.osim
    output_marker_file: C:\Users\z3550257\Dropbox\University\GitHubClones\TheiaOpensim\ExampleData\P01_procesed_with_single_calib\ModelScaling\static_0_Theia_markersScaled.xml
    max_marker_movement: -1
    IKTaskSet:
      IKMarkerTask TORSO: apply=true weight=1
      IKMarkerTask RSHO: apply=true weight=1
      IKMarkerTask RUA: apply=true weight=0.1
      IKMarkerTask RELB: apply=true weight=1
      IKMarkerTask RFRM: apply=true weight=0.1
      IKMarkerTask RWRIST: apply=true weight=1
      IKMarkerTask RHAND: apply=true weight=1
      IKMarkerTask PELVIS2: apply=true weight=0.5
      IKMarkerTask RHIP: apply=true weight=1
      IKMarkerTask RTHI: apply=true weight=0.1
      IKMarkerTask RKNEE: apply=true weight=1
      IKMarkerTask RSHA: apply=true weight=0.1
      IKMarkerTask RANK: apply=true weight=1
      IKMarkerTask RCALC: apply=true weight=1
      IKMarkerTask R_LCALC: apply=true weight=0.1
      IKMarkerTask RMTP: apply=true weight=1
      IKMarkerTask RTOE: apply=true weight=1
      IKMarkerTask LSHO: apply=true weight=1
      IKMarkerTask LUA: apply=true weight=0.1
      IKMarkerTask LELB: apply=true weight=1
      IKMarkerTask LFRM: apply=true weight=0.1
      IKMarkerTask LWRIST: apply=true weight=1
      IKMarkerTask LHAND: apply=true weight=1
      IKMarkerTask LHIP: apply=true weight=1
      IKMarkerTask LTHI: apply=true weight=0.1
      IKMarkerTask LKNEE: apply=true weight=1
      IKMarkerTask LSHA: apply=true weight=0.1
      IKMarkerTask LANK: apply=true weight=1
      IKMarkerTask LCALC: apply=true weight=1
      IKMarkerTask L_LCALC: apply=true weight=0.1
      IKMarkerTask LMTP: apply=true weight=1
      IKMarkerTask LTOE: apply=true weight=1
      IKMarkerTask PELVIS1: apply=true weight=1
      IKMarkerTask CVJ: apply=true weight=1
      IKMarkerTask HEAD_L: apply=true weight=0.1
      IKMarkerTask HEAD_R: apply=true weight=0.1
      IKMarkerTask TORSO_L: apply=true weight=0.1
      IKMarkerTask TORSO_R: apply=true weight=0.1
      IKMarkerTask TORSO_LOW: apply=true weight=0.1
      IKMarkerTask HEAD_CENTRE: apply=true weight=0.5
